# VARIFLEX Raumtrennsystem

Dataset: ILCD process, EPD, specific dataset
Geography: DE
Reference year: 2012
Valid until: 2017
Classification: OEKOBAU.DAT: Komposite / Systembauteile / Innenwände
Classification: IBUCategories: 02 Bauprodukte / Raumtrennsysteme / Raumtrennsysteme
Method details: Raumtrennsysteme.pdf
Owner: DORMA Hüppe Raumtrennsysteme GmbH + Co. KG
Compliance: DIN EN 15804; ISO 14025
Review: Accredited third party review by IBU
Amounts: rows without a unit in brackets have none in this file; such an amount is in the reference unit of its flow, which a separate flow dataset defines
copyright: false

## General comment
Das Raumtrennsystem VARIFLEX ist ein horizontal bewegliches schalldämmendes Trennwandsystem in Stahl-Aluminium-Konstruktion bestehend aus unabhängig voneinander verfahrbaren Einzel-elementen mit folgenden Eigenschaften:

· vielfältige Ausführungsmöglichkeiten,

· Deckplatten akustisch freischwingend aufgehängt,

· Elementhöhen bis zu 14,5 m.

## Technology and included processes
Das VARIFLEX Raumtrennsystem besteht aus Spanplatten, Bitumenfolie, Stahl-, Kunststoff-, Zinkguss- sowie Kupfer Bauteilen, eloxierten Alu-Profilen, Glaswolle und Papier. Für den Elementrahmen werden vertikal Aluminiumprofile und horizontal Stahlprofile benötigt. Die Aluminiumvertikalprofile werden zugeschnitten und an den Enden mit Ausschnitten für die PU-Endstückeder Dichtleisten versehen. An den Positionen der horizontalen Stahlprofile werden Bohrungen gestanzt. Die auf Länge gesägten Stahlprofile werden gestanzt und ausgeschnitten. In den Kammern der Vertikalprofile werden Dichtprofile und Magnetbänder eingezogen. Für die obere und untere Abdichtung werden geschnittene Aluminiumprofile und PU-Formteile als Dichtleisten zusammengefügt. Zur späteren Betätigung dieser Dichtleisten werden Druckrohre aus Stahlrohren und Druckfedern durch verdrücken der Einzelteile vorgefertigt. Auf einem Montagetisch werden die horizontalen Stahlprofile und die vertikalen Aluminiumprofile fixiert. Die Vertikalprofile werden mit Schrauben an den Enden der horizontalen Profile befestigt. So entsteht der Elementrahmen des Trennwandelementes. Am mittleren Horizontalprofil wird eine (vom Zulieferer vorgefertigte) Ausfahreinheit (Spindelsystem im Prinzip eines Wagenhebers) befestigt. An dieser Ausfahreinheit werden die vorgefertigten Druckrohre und ein Bedienrohr verschweißt. An die oberen und unteren Enden der Druckrohre werden mit Splinten die vorgefertigten Dichtleisten befestigt. In den Hohlräumen des entstandenen Elementrahmens wird Mineralwolle eingefügt. Diese Mineralwolle wird an beiden Seiten des Elementrahmens durch geklebtes Kraftpapier abgedeckt. Für die beidseitigen Deckplatten werden beschichtete Spanlatten auf das vorgesehene Maß gesägt. Späne und Reste werden abgesaugt und gesammelt. Auf die Rückseite der Spanplatten werden an vorgesehener Position Aufhängebleche für die spätere Befestigung zum Elementrahmen aufgeschraubt. Die Deckplatten und die Elementrahmen werden auf Paletten verpackt. Der Transport zur und auf der Baustelle erfolgt wegen der hohen Gewichte der einzelnen Teile/Baugruppen getrennt. Der Zusammenbau des Rahmens mit der Deckplatte erfolgt durch einfaches Aufhängen und Einklemmen der Deckplatten auf der Baustelle.
Technische Daten:
· Schalldämm-Maß R in [dB] = 38 dB bis 57 dB nach DIN EN ISO 140-3:2005

· Wärmedurchgangskoeffizient (U-Wert) in [W/(m²K)] = 0,55 bis 0,67 – berechnet nach
ISO 6946

· Last aus Wandgewicht in [kN/m²] = 0,36 bis 0,59
Deklarierte Einheit:
Die deklarierte Einheit ist 1 m² des Raumtrennsystems VARIFLEX Vollelement inklusive der Verpackungsmaterialien, exklusive der jeweiligen Befestigungsmittel und Dichtstoffe an den Randbereichen zu Wand, Boden und Decke.

## Technical purpose
Die unabhängig voneinander verfahrbaren Einzelelemente werden in Deckenschienen in die gewünschte Position gefahren. Für ein schalldämmendes und standfestes Abdichten der Elemente zum Boden, zur Wand und Deckenschiene werden die Elemente über eine Spindelmechanik mittels Bedienkurbel manuell verspannt.

Das Raumtrennwandsystem bietet eine flexible Raumnutzung durch eine multifunktionale und offene Raumgestaltung:

· Mit beweglichen VARIFLEX Trennwänden werden Flächen und Räume geteilt.

· Entsprechend der Gruppengröße können die Raumgrößen angepasst werden.

· Die hohe Schalldämmung ermöglicht Parallelveranstaltungen.

· Flächen und Räume werden effizienter genutzt.

Anwendungsbereiche u. a.: Büros, Hotels, Tagungszentren, Messen, Schulen, kirchliche Einrichtungen und Ateliers.

## Reference product
- VARIFLEX Vollelement 1m²: 1

## Inputs
- Erneuerbare Primärenergie als Energieträger (PERE) [MJ]: A1 856, A2 0.381, A3 -4.23, A4 1.02, A5 0.101, C2 0.249, C3 2.3, D -132
- Erneuerbare Primärenergie zur stofflichen Nutzung (PERM) [MJ]: A1 0, A2 0, A3 0, A4 0, A5 0, C2 0, C3 0, D 0
- Total erneuerbare Primärenergie (PERT) [MJ]: A1 856, A2 0.381, A3 -4.23, A4 1.02, A5 0.101, C2 0.249, C3 2.3, D -132
- Nicht-erneuerbare Primärenergie als Energieträger (PENRE) [MJ]: A1 1520, A2 9.6, A3 -15.4, A4 25.6, A5 2.15, C2 6.38, C3 -48.4, D -1020
- Nicht-erneuerbare Primärenergie zur stofflichen Nutzung (PENRM) [MJ]: A1 0.000664, A2 0, A3 2.68e-9, A4 0, A5 1.98e-10, C2 0, C3 2.46e-6, D -2.06e-8
- Total nicht erneuerbare Primärenergie (PENRT) [MJ]: A1 1520, A2 9.6, A3 -15.4, A4 25.6, A5 2.15, C2 6.38, C3 -48.4, D -1020
- Einsatz von Sekundärstoffen (SM) [kg]: A1 5.73, A2 0, A3 0, A4 0, A5 0, C2 0, C3 0, D 0
- Erneuerbare Sekundärbrennstoffe (RSF) [MJ]: A1 0, A2 0, A3 0, A4 0, A5 0, C2 0, C3 0, D 0
- Nicht erneuerbare Sekundärbrennstoffe (NRSF) [MJ]: A1 0, A2 0, A3 0, A4 0, A5 0, C2 0, C3 0, D 0
- Einsatz von Süßwasserressourcen (FW) [m^3]: A1 355, A2 0.0355, A3 -4.41, A4 0.0949, A5 0.339, C2 0.024, C3 2.8, D -0.336

## Outputs
- Gefährlicher Abfall zur Deponie (HWD) [kg]: A1 0.00218, A2 0, A3 0, A4 0, A5 0, C2 0, C3 0.0595, D -0.0804
- Entsorgter nicht gefährlicher Abfall (NHWD) [kg]: A1 155, A2 0.0504, A3 -4.84, A4 0.135, A5 0.772, C2 0.0225, C3 -51.9, D -63.6
- Entsorgter radioaktiver Abfall (RWD) [kg]: A1 0.0386, A2 1.35e-5, A3 -0.00064, A4 3.62e-5, A5 4.29e-5, C2 8.88e-6, C3 0.00375, D -0.0439
- Komponenten für die Wiederverwendung (CRU) [kg]: A1 0, A2 0, A3 0, A4 0, A5 0, C2 0, C3 0, D 0
- Stoffe zum Recycling (MFR) [kg]: A1 0, A2 0, A3 0.399, A4 0, A5 0, C2 0, C3 7.79, D 0
- Stoffe für die Energierückgewinnung (MER) [kg]: A1 0, A2 0, A3 2.43, A4 0, A5 7.88, C2 0, C3 34.3, D 0
- Exportierte elektrische Energie (EEE) [MJ]: A1 0, A2 0, A3 6.39, A4 0, A5 19.3, C2 0, C3 154, D 0
- Exportierte thermische Energie (EET) [MJ]: A1 0, A2 0, A3 18.8, A4 0, A5 46.9, C2 0, C3 139, D 0

## Impact indicators
- Globales Erwärmungspotenzial (GWP) [kg CO_(2)-Äq.]: A1 34.9, A2 0.694, A3 3.5, A4 1.85, A5 14.6, C2 0.462, C3 58.5, D -68.2
- Abbau Potential der stratosphärischen Ozonschicht (ODP) [kg CFC11-Äq.]: A1 2.07e-5, A2 4.11e-11, A3 -9.55e-9, A4 9.96e-11, A5 -1.24e-8, C2 1.71e-10, C3 1.05e-7, D -3.04e-6
- Versauerungspotenzial von Boden und Wasser (AP) [kg SO_(2)-Äq.]: A1 0.371, A2 0.00321, A3 -0.00631, A4 0.00847, A5 0.000932, C2 0.00232, C3 -0.00788, D -0.172
- Eutrophierungspotenzial (EP) [kg PO_(4)^(3)-Äq.]: A1 0.0372, A2 0.000322, A3 -0.000464, A4 0.000842, A5 9.92e-5, C2 0.000255, C3 -0.00301, D -0.0127
- Bildungspotential für troposphärisches Ozon (POCP) [kg Ethen-Äq.]: A1 0.0409, A2 0.000765, A3 -0.000107, A4 0.00202, A5 0.000267, C2 0.000538, C3 0.00219, D -0.0105
- Potenzial für den abiotischen Abbau nicht fossiler Ressourcen (ADPE) [kg Sb-Äq.]: A1 0.00179, A2 3.17e-8, A3 -1.14e-6, A4 8.49e-8, A5 3.57e-7, C2 1.82e-8, C3 -6.13e-6, D -1.42e-5
- Potenzial für den abiotischen Abbau fossiler Brennstoffe (ADPF) [MJ]: A1 1360, A2 9.56, A3 -13.8, A4 25.6, A5 2.15, C2 6.36, C3 -59.6, D -892

## Use advice
Gültigkeitsbereich:
Die Ökobilanz beruht auf Daten, die für das übergreifende, einzelne Geschäftsjahr 2011 und 2012 am Produktionsstandort Westerstede/Ocholt, Deutschland erhoben wurden.
Systemgrenze:
Typ der EPD: Wiege bis Bahre (mit Optionen)

Berücksichtigt werden gemäß EN 15804 folgende Module:

Produktstadium: A1 – A3

Die Extraktion und Aufbereitung der Rohstoffe und Biomasseproduktion und -aufbereitung inklusive aller entsprechenden Vorketten einschließlich der Bereitstellung von Strom, Dampf und Wärme aus primären Energierohstoffen inklusive deren Extraktion, Raffinerie und Transport sowie der notwendigen Beschaffungstransporte bis zum Werkstor und der Herstellung der Verpackung werden in diesem Modul berücksichtigt. Weitere Informationen sind Kapitel 3.8 zu entnehmen.

Baustadium: A4 – A5

Dieses Modul umfasst den Distributionsweg sowie die energetische Verwertung der Verpackungsmaterialien.

Entsorgungsstadium: C2 – C3

In diesem Modul werden die Transporte zur Recyclinganlage sowie Sammel-, Aufbereitungs- und Verwertungsaufwand berücksichtigt.

Gutschriften: D

Die entstehenden Wertströme des stofflichen Recyclings und der energetischen Verwertung für ein nachgelagertes Produktsystem werden in diesem Modul ausgewiesen.

Die Ökobilanz wurde für den Bezugsraum Deutschland erstellt. Dies bedeutet, dass neben den Produktionsprozessen unter diesen Randbedingungen auch die für Deutschland relevanten Vorstufen, wie Strom oder Energieträgerbereitstellung, verwendet wurden.

## Data sources
- VARIFLEX Raumtrennsystem.pdf
- GaBi Database (all versions)
- GaBi database SP20 2013
