# MOVEO Raumtrennsystem

Dataset: ILCD process, EPD, specific dataset
Geography: DE
Reference year: 2012
Valid until: 2017
Classification: OEKOBAU.DAT: Komposite / Systembauteile / Innenwände
Classification: IBUCategories: 02 Bauprodukte / Raumtrennsysteme / Raumtrennsysteme
Method details: Raumtrennsysteme.pdf
Owner: DORMA Hüppe Raumtrennsysteme GmbH + Co. KG
Compliance: DIN EN 15804; ISO 14025
Review: Accredited third party review by IBU
Amounts: rows without a unit in brackets have none in this file; such an amount is in the reference unit of its flow, which a separate flow dataset defines
copyright: true

## General comment
Das Raumtrennsystem MOVEO ist ein horizontal bewegliches schalldämmendes Trennwandsystem in geschlossener Verbundbauweise bestehend aus unabhängig voneinander verfahrbaren Einzelelementen mit folgenden Eigenschaften:

· Hohe Stabilität bei niedrigen Flächengewichten

· Leichte Verfahrbarkeit der Wände

· ComforTronic für hohen Bedienkomfort und mehr Sicherheit

· ComfortDrive – die vollautomatische Variante

· Einheitliches Design: Alle Produktausführungen des Systems können miteinander kombiniert werden

## Technology and included processes
Das MOVEO Raumtrennsystem besteht aus einer MDF-Platte, Bitumenfolie, eloxierten Alu-Profilen, Glaswolle, Kunststoff-, Zinkguss, Kupfer- sowie Stahl Bauteilen, einem Getriebemotor, Kabel, Leiterplatinen und Papier. Aluminiumprofile für den rechteckigen Grundrahmen werden auf Länge zugesägt. In die horizontalen und vertikalen Profile werden in speziell hierfür vorgesehene Kammern Dichtprofile eingezogen und fixiert. Diese Profile werden mit Kunststoffwinkeln zu einem Rahmen zusammengefügt. Für die obere und untere Abdichtung werden aus zugeschnittenen Aluminiumprofilen und PU-Form-teilen sogenannte Dichtleisten zusammengefügt. Für die beidseitigen Deckplatten werden beschichtete MDF-Platten gesägt. Späne und Reste werden abgesaugt und gesammelt. Die Deckplatten werden umlaufend mittels Hotmelt- Kleber mit einer Kante versehen. In die oberen und unteren Profile werden elektrische Ausfahreinheiten montiert. In das obere tragende Profil werden zusätzlich Rollenaufhängungen mittels Schraubverbindung eingebaut. Die vorgefertigten Dichtleisten werden auf die Ausfahreinheiten aufgeklipst. Beidseitig oberhalb der vertikalen Profile werden Kontaktstecker mit Kabelverbindung zur Ausfahreinheit verschraubt. Die fertigen Trennwandelemente werden elektrisch auf Funktion (Aus- und Einfahren der oberen/unteren Dichtleisten) geprüft und anschließend auf eine Palette zum Versand verpackt.
Technische Daten:
· Schalldämm-Maß R in [dB] = 38 dB bis 55 dB nach DIN EN ISO 140-3:2005

· Wärmedurchgangskoeffizient (U-Wert) in [W/(m²K)] = 0,42 bis 0,46 – berechnet nach
ISO 6946

· Last aus Wandgewicht in [kN/m²] = 0,16 bis 0,40
Deklarierte Einheit:
Die deklarierte Einheit ist 1 m² des Raumtrennsystems MOVEO Vollelement inklusive der Verpackungsmaterialien, exklusive der jeweiligen Befestigungsmittel und Dichtstoffe an den Randbereichen zu Wand, Boden und Decke.

## Technical purpose
Die unabhängig voneinander verfahrbaren Einzelelemente werden in Deckenschienen in die gewünschte Position verfahren. Für ein schalldämmendes und standfestes Abdichten der Elemente zum Boden, zur Wand und Deckenschiene werden die Elemente mittels ComforTronic gesteuert, d. h. automatisch elektromotorisch aus- bzw. eingefahren. Die Stromzuführung erfolgt von Element zu Element über stirnseitige Kontakte. Die gesamten Funktionen der Trennwand werden durch einen Mikroprozessor überwacht.

Das Raumtrennsystem bietet eine flexible Raumnutzung durch eine multifunktionale und offene Raumgestaltung:

· Mit beweglichen MOVEO Trennwänden werden Flächen und Räume geteilt.

· Entsprechend der Gruppengröße können die Raumgrößen angepasst werden.

· Die hohe Schalldämmung ermöglicht Parallelveranstaltungen.

· Flächen und Räume werden effizienter genutzt.

Anwendungsbereiche u. a.: Büros, Hotels, Tagungszentren, Messen, Schulen, kirchliche Einrichtungen und Ateliers.

## Reference product
- MOVEO Vollelement: 1

## Inputs
- Erneuerbare Primärenergie als Energieträger (PERE) [MJ]: A1 707, A2 0.232, A3 -24.3, A4 0.631, A5 0.101, B6 172, C2 0.162, C3 -1.68, D -205
- Erneuerbare Primärenergie zur stofflichen Nutzung (PERM) [MJ]: A1 0, A2 0, A3 0, A4 0, A5 0, B6 0, C2 0, C3 0, D 0
- Total erneuerbare Primärenergie (PERT) [MJ]: A1 707, A2 0.232, A3 -24.3, A4 0.631, A5 0.101, B6 172, C2 0.162, C3 -1.68, D -205
- Nicht-erneuerbare Primärenergie als Energieträger (PENRE) [MJ]: A1 1680, A2 5.83, A3 -122, A4 16.2, A5 2.15, B6 1180, C2 4.16, C3 -258, D -975
- Nicht-erneuerbare Primärenergie zur stofflichen Nutzung (PENRM) [MJ]: A1 0.00142, A2 0, A3 1.24e-9, A4 0, A5 1.98e-10, B6 0, C2 0, C3 9.86e-9, D -3.43e-8
- Total nicht erneuerbare Primärenergie (PENRT) [MJ]: A1 1680, A2 5.83, A3 -122, A4 16.2, A5 2.15, B6 1180, C2 4.16, C3 -258, D -975
- Einsatz von Sekundärstoffen (SM) [kg]: A1 3.67, A2 0, A3 0, A4 0, A5 0, B6 0, C2 0, C3 0, D 0
- Erneuerbare Sekundärbrennstoffe (RSF) [MJ]: A1 0, A2 0, A3 0, A4 0, A5 0, B6 0, C2 0, C3 0, D 0
- Nicht erneuerbare Sekundärbrennstoffe (NRSF) [MJ]: A1 0, A2 0, A3 0, A4 0, A5 0, B6 0, C2 0, C3 0, D 0
- Einsatz von Süßwasserressourcen (FW) [m^3]: A1 676, A2 0.0216, A3 -3.84, A4 0.0608, A5 0.339, B6 246, C2 0.0156, C3 0.361, D -0.32

## Outputs
- Gefährlicher Abfall zur Deponie (HWD) [kg]: A1 0.172, A2 0, A3 0, A4 0, A5 0, B6 0, C2 0, C3 0.0992, D -0.134
- Entsorgter nicht gefährlicher Abfall (NHWD) [kg]: A1 269, A2 0.0303, A3 -16.5, A4 0.0569, A5 0.772, B6 252, C2 0.0146, C3 -26, D -73.4
- Entsorgter radioaktiver Abfall (RWD) [kg]: A1 0.0708, A2 8.23e-6, A3 -0.00618, A4 2.25e-5, A5 4.29e-5, B6 0.169, C2 5.79e-6, C3 -0.00703, D -0.0634
- Komponenten für die Wiederverwendung (CRU) [kg]: A1 0, A2 0, A3 0, A4 0, A5 0, B6 0, C2 0, C3 0, D 0
- Stoffe zum Recycling (MFR) [kg]: A1 0, A2 0, A3 0.562, A4 0, A5 0, B6 0, C2 0, C3 6.25, D 0
- Stoffe für die Energierückgewinnung (MER) [kg]: A1 0, A2 0, A3 4.06, A4 0, A5 7.88, B6 0, C2 0, C3 24.3, D 0
- Exportierte elektrische Energie (EEE) [MJ]: A1 0, A2 0, A3 13.9, A4 0, A5 19.4, B6 0, C2 0, C3 80, D 0
- Exportierte thermische Energie (EET) [MJ]: A1 0, A2 0, A3 4.68, A4 0, A5 46.9, B6 0, C2 0, C3 32, D 0

## Impact indicators
- Globales Erwärmungspotenzial (GWP) [kg CO_(2)-Äq.]: A1 78.9, A2 0.422, A3 -1.54, A4 1.16, A5 14.6, B6 67.5, C2 0.301, C3 24.6, D -68.8
- Abbau Potential der stratosphärischen Ozonschicht (ODP) [kg CFC11-Äq.]: A1 1.05e-5, A2 2.89e-11, A3 -2.06e-7, A4 4.32e-10, A5 -1.24e-8, B6 4.41e-6, C2 1.11e-10, C3 -5.59e-7, D -5.04e-6
- Versauerungspotenzial von Boden und Wasser (AP) [kg SO_(2)-Äq.]: A1 0.657, A2 0.00194, A3 -0.0298, A4 0.00557, A5 0.000932, B6 0.288, C2 0.00152, C3 0.0139, D -0.246
- Eutrophierungspotenzial (EP) [kg PO_(4)^(3)-Äq.]: A1 0.0552, A2 0.00046, A3 -0.000603, A4 0.00127, A5 0.000267, B6 0.0155, C2 0.000351, C3 0.00454, D -0.0121
- Bildungspotential für troposphärisches Ozon (POCP) [kg Ethen-Äq.]: A1 0.0615, A2 0.000194, A3 -0.00182, A4 0.000569, A5 9.92e-5, B6 0.0175, C2 0.000166, C3 -0.000622, D -0.0155
- Potenzial für den abiotischen Abbau nicht fossiler Ressourcen (ADPE) [kg Sb-Äq.]: A1 0.00479, A2 1.92e-8, A3 -2.81e-6, A4 4.6e-8, A5 3.57e-7, B6 5.54e-6, C2 1.18e-8, C3 -8.22e-5, D -2.13e-5
- Potenzial für den abiotischen Abbau fossiler Brennstoffe (ADPF) [MJ]: A1 1450, A2 5.81, A3 -102, A4 16.1, A5 2.15, B6 770, C2 4.15, C3 -221, D -788

## Use advice
Gültigkeitsbereich:
Die Ökobilanz beruht auf Daten, die für das übergreifende, einzelne Geschäftsjahr 2011 und 2012 am Produktionsstandort Westerstede/Ocholt, Deutschland erhoben wurden.
Systemgrenze:
Typ der EPD: Wiege bis Bahre (mit Optionen)

Berücksichtigt werden gemäß EN 15804 folgende Module:

Produktstadium: A1 – A3

Die Extraktion und Aufbereitung der Rohstoffe und Biomasseproduktion inklusive aller entsprechenden Vorketten einschließlich der Bereitstellung von Strom, Dampf und Wärme aus primären Energierohstoffen inklusive deren Extraktion, Raffinerie und Transport sowie der notwendigen Beschaffungstransporte bis zum Werkstor und der Herstellung der Verpackung werden in diesem Modul berücksichtigt. Weitere Details sind Kapitel 3.8 zu entnehmen.

Baustadium: A4 – A5

Dieses Modul umfasst den Distributionsweg sowie die energetische Verwertung der Verpackungsmaterialien.

Nutzungsstadium: B6

Das Nutzungsstadium bezieht sich auf den Betrieb des Gebäudes und umfasst den Energieeinsatz für den Betrieb des deklarierten Produktes.

Entsorgungsstadium: C2 – C3

In diesem Modul werden die Transporte zur Recyclinganlage sowie Sammel-, Aufbereitungs- und Verwertungsaufwand berücksichtigt.

Gutschriften: D

Die entstehenden Wertströme des stofflichen Recyclings und der energetischen Verwertung für ein nachgelagertes Produktsystem werden in diesem Modul ausgewiesen.

Die Ökobilanz wurde für den Bezugsraum Deutschland erstellt. Dies bedeutet, dass neben den Produktionsprozessen unter diesen Randbedingungen auch die für Deutschland relevanten Vorstufen, wie Strom oder Energieträgerbereitstellung, verwendet wurden.

## Data sources
- MOVEO Raumtrennsystem.pdf
- GaBi Database (all versions)
- GaBi database SP20 2013
