# VARITRANS Raumtrennsystem

Dataset: ILCD process, EPD, representative dataset
Geography: DE
Reference year: 2012
Valid until: 2017
Classification: OEKOBAU.DAT: Komposite / Systembauteile / Innenwände
Classification: IBUCategories: 02 Bauprodukte / Raumtrennsysteme / Raumtrennsysteme
Method details: Raumtrennsysteme.pdf
Owner: DORMA Hüppe Raumtrennsysteme GmbH + Co. KG
Compliance: DIN EN 15804; ISO 14025
Review: Accredited third party review by IBU
Amounts: rows without a unit in brackets have none in this file; such an amount is in the reference unit of its flow, which a separate flow dataset defines
copyright: true

## General comment
Das Raumtrennsystem VARITRANS ist ein horizontal bewegliches Sicherheitsglas-Trennwandsystem bestehend aus unabhängig voneinander verfahrbaren Einzelelementen mit den folgenden Eigenschaften:

· Offenheit mit natürlicher Ästhetik,

· elegantes Design für ein durchgängiges Erscheinungsbild,

· flexibles Baukastensystem mit vielen Ausstattungsvarianten und Türlösungen,

· manuell und vollautomatische Ausführung.

## Technology and included processes
Das VARITRANS Raumtrennsystem besteht aus ESG Glas, eloxierten Alu-Profilen, Stahl-, Kuper-, Zinkguss- sowie Kunststoff-Bauteilen. Die Glasscheibe für das Trennwandelement wird auf einem Montagetisch positioniert. An den oberen und unteren Enden der Scheibe werden mittels Montageschablonen Klemmprofile positioniert und mit Schrauben verklemmt. Über diese Klemmprofile werden beidseitig die zugeschnittenen Aluminiumprofile (tragende und abdeckende Funktion) geschoben und mit Stahlblechklammen fixiert. An der Oberseite des Glaselements werden dann vorgefertigte Trageinheiten mit Tragrollen in die Abdeckprofile seitlich eingeschoben und mit Klemmschrauben befestigt. An der Unterseite des Glaselements werden auf die gleiche Art Bodenriegel und Falle montiert. Die offenen Seiten zwischen den Abdeckprofilen werden mit aufgeschraubten Endkappen verschlossen. Nach einer Funktionsprüfung werden die Glaselemente auf Paletten mit Styropor-Zwischenlagen zum Versand verpackt.
Technische Daten:
· Glasdicke 10 und 12 mm ESG; 11,5 und
13,5 mm VSG

· Last aus Wandgewicht in [kN/m²] = 0,25 bis 0,34
Deklarierte Einheit:
Die deklarierte Einheit ist 1 m² des Raumtrennsystems VARITRANS Vollelement inklusive der Verpackungsmaterialien, exklusive der jeweiligen Befestigungsmittel und Dichtstoffe an den Randbereichen zu Wand, Boden und Decke.

## Technical purpose
Die unabhängig voneinander verfahrbaren Einscheiben-Glaselemente werden in Deckenschienen in die gewünschte Position verfahren. Die Funktionselemente sind in den Beschlägen integriert.

Das Raumtrennsystem bietet eine flexible und transparente Raumnutzung durch eine multifunktionale Raumgestaltung:

· Mit beweglichen VARITRANS Trennwänden werden Flächen und Räume geteilt.

· Erhaltung der Offenheit, Großzügigkeit und Helligkeit der Fläche durch die lichtdurchlässigen Elemente.

· Flächen und Räume werden effizienter genutzt.

Anwendungsbereiche u. a.: SB-Zonen in Banken, Ladenlokale, Ausstellungs- und Präsentationsräume und Foyers.

## Reference product
- VARITRANS Vollelement 1m²: 1

## Inputs
- Erneuerbare Primärenergie als Energieträger (PERE) [MJ]: A1 393, A2 0.0618, A3 -14.5, A4 0.473, A5 0.0784, C2 0.0661, C3 1.02, D -126
- Erneuerbare Primärenergie zur stofflichen Nutzung (PERM) [MJ]: A1 0, A2 0, A3 0, A4 0, A5 0, C2 0, C3 0, D 0
- Total erneuerbare Primärenergie (PERT) [MJ]: A1 393, A2 0.0618, A3 -14.5, A4 0.473, A5 0.0784, C2 0.0661, C3 1.02, D -126
- Nicht-erneuerbare Primärenergie als Energieträger (PENRE) [MJ]: A1 1190, A2 1.56, A3 -41.7, A4 11.9, A5 1.9, C2 2.17, C3 7.15, D -610
- Nicht-erneuerbare Primärenergie zur stofflichen Nutzung (PENRM) [MJ]: A1 0.000741, A2 0, A3 0, A4 0, A5 2.18e-10, C2 3.56e-6, C3 0.0023, D -1.23e-6
- Total nicht erneuerbare Primärenergie (PENRT) [MJ]: A1 1190, A2 1.56, A3 -41.7, A4 11.9, A5 1.9, C2 2.17, C3 7.15, D -610
- Einsatz von Sekundärstoffen (SM) [kg]: A1 24.6, A2 0, A3 0, A4 0, A5 0, C2 0, C3 0, D 0
- Erneuerbare Sekundärbrennstoffe (RSF) [MJ]: A1 0, A2 0, A3 0, A4 0, A5 0, C2 0, C3 0, D 0
- Nicht erneuerbare Sekundärbrennstoffe (NRSF) [MJ]: A1 0, A2 0, A3 0, A4 0, A5 0, C2 0, C3 0, D 0
- Einsatz von Süßwasserressourcen (FW) [m^3]: A1 558, A2 0.00576, A3 -15.4, A4 0.0441, A5 0.339, C2 0.0611, C3 0.682, D -0.918

## Outputs
- Gefährlicher Abfall zur Deponie (HWD) [kg]: A1 0.00123, A2 0, A3 0, A4 0, A5 0, C2 0, C3 0.0554, D -0.0748
- Entsorgter nicht gefährlicher Abfall (NHWD) [kg]: A1 140, A2 0.00818, A3 -7.5, A4 0.0629, A5 0.645, C2 0.0051, C3 -7.52, D -109
- Entsorgter radioaktiver Abfall (RWD) [kg]: A1 0.0414, A2 2.2e-6, A3 -0.00272, A4 1.68e-5, A5 2.53e-5, C2 2.02e-6, C3 0.00116, D -0.0429
- Komponenten für die Wiederverwendung (CRU) [kg]: A1 0, A2 0, A3 0, A4 0, A5 0, C2 0, C3 0, D 0
- Stoffe zum Recycling (MFR) [kg]: A1 0, A2 0, A3 0.345, A4 0, A5 0, C2 0, C3 28.5, D 0
- Stoffe für die Energierückgewinnung (MER) [kg]: A1 0, A2 0, A3 0, A4 0, A5 8.67, C2 0, C3 0.101, D 0
- Exportierte elektrische Energie (EEE) [MJ]: A1 0, A2 0, A3 0, A4 0, A5 19.8, C2 0, C3 0.716, D 0
- Exportierte thermische Energie (EET) [MJ]: A1 0, A2 0, A3 0, A4 0, A5 47.7, C2 0, C3 0.57, D 0

## Impact indicators
- Globales Erwärmungspotenzial (GWP) [kg CO_(2)-Äq.]: A1 70.2, A2 0.113, A3 -3.5, A4 0.861, A5 15.3, C2 0.15, C3 0.77, D -46.3
- Abbau Potential der stratosphärischen Ozonschicht (ODP) [kg CFC11-Äq.]: A1 7.52e-6, A2 6.51e-12, A3 -4.32e-8, A4 4.63e-11, A5 -1.37e-8, C2 7.4e-9, C3 7.38e-8, D -2.86e-6
- Versauerungspotenzial von Boden und Wasser (AP) [kg SO_(2)-Äq.]: A1 0.539, A2 0.000515, A3 -0.0205, A4 0.00393, A5 0.000824, C2 0.000776, C3 -0.00113, D -0.194
- Eutrophierungspotenzial (EP) [kg PO_(4)^(3)-Äq.]: A1 0.0563, A2 0.000123, A3 -0.000926, A4 0.000936, A5 0.000278, C2 0.000198, C3 0.000103, D -0.0172
- Bildungspotential für troposphärisches Ozon (POCP) [kg Ethen-Äq.]: A1 0.0353, A2 5.13e-5, A3 -0.0011, A4 0.000391, A5 9.77e-5, C2 9.62e-5, C3 -0.000444, D -0.0126
- Potenzial für den abiotischen Abbau nicht fossiler Ressourcen (ADPE) [kg Sb-Äq.]: A1 0.00137, A2 5.14e-9, A3 -1.12e-6, A4 3.94e-8, A5 2.73e-7, C2 1.2e-7, C3 6.41e-7, D -0.00274
- Potenzial für den abiotischen Abbau fossiler Brennstoffe (ADPF) [MJ]: A1 1070, A2 1.55, A3 -35.1, A4 11.9, A5 1.96, C2 2.12, C3 2.26, D -487

## Use advice
Gültigkeitsbereich:
Die Ökobilanz beruht auf Daten, die für das über-greifende, einzelne Geschäftsjahr 2011 und 2012 am Produktionsstandort Westerstede/Ocholt, Deutschland erhoben wurden.
Systemgrenze:
Typ der EPD: Wiege bis Bahre (mit Optionen)

Berücksichtigt werden gemäß EN 15804 folgende Module:

Produktstadium: A1 – A3

Die Extraktion und Aufbereitung der Rohstoffe inklusive aller entsprechenden Vorketten einschließlich der Bereitstellung von Strom, Dampf und Wärme aus primären Energierohstoffen inklusive deren Extraktion, Raffinerie und Transport sowie der notwendigen Beschaffungstransporte bis zum Werkstor und der Herstellung der Verpackung werden in diesem Modul berücksichtigt.

Baustadium: A4 – A5

Dieses Modul umfasst den Distributionsweg sowie die energetische Verwertung der Verpackungsmaterialien.

Entsorgungsstadium: C2 – C3

In diesem Modul werden die Transporte zur Recyclinganlage sowie Sammel-, Aufbereitungs- und Verwertungsaufwand berücksichtigt.

Gutschriften: D

Die entstehenden Wertströme des stofflichen Recyclings und der energetischen Verwertung für ein nachgelagertes Produktsystem werden in diesem Modul ausgewiesen.

Die Ökobilanz wurde für den Bezugsraum Deutschland erstellt. Dies bedeutet, dass neben den Produktionsprozessen unter diesen Randbedingungen auch die für Deutschland relevanten Vorstufen, wie Strom oder Energieträgerbereitstellung, verwendet wurden.

## Data sources
- VARITRANS Raumtrennsystem.pdf
- GaBi Database (all versions)
- GaBi database SP20 2013
